// SBML level 2 version 1
// Model Starts Here

model cell()

  // Compartments:
  compartment compartment = 1;

  // Species:
  species IFNbmRNA in compartment = 0;
  species IFNb in compartment = 0;
  species IRF7mRNA in compartment = 0;
  species STAT2Pn in compartment = 0;
  species $DNA in compartment = 0;

  // Parameters:
  r1 = 0.003;
  b1 = 0.28;
  time_ = 1;
  r2 = 6e-5;
  KK2 = 0.002;
  r4 = 0.00036;
  b4 = 0.2;
  k4 = 0.69;
  r3 = 0.36;
  KK3 = 0.0043;
  k3 = 1.24;
  k1 = 0.28;

  // Reactions:
  _J1: $DNA => IFNbmRNA; r1*exp(-b1*time);
  _J3: => IFNb; r2*IFNbmRNA/(KK2 + IFNbmRNA);  // modifiers: IFNbmRNA
  _J4: $DNA => IRF7mRNA; r4*exp(-b4*time)*STAT2Pn;  // modifiers: STAT2Pn
  _J5: IRF7mRNA => ; k4*IRF7mRNA;
  _J6: => STAT2Pn; r3*IFNb/(KK3 + IFNb);  // modifiers: IFNb
  _J7: STAT2Pn => ; k3*STAT2Pn;
  J7: IFNbmRNA => ; k1*IFNbmRNA;
end
